# OpenSim document version 30000
Model:
  ForceSet:
    RigidTendonMuscle TailRMuscle: max_isometric_force=1000 optimal_fiber_length=4.843431 tendon_slack_length=0.538159
      PathPoint TailRMuscle_node0: link_Tail22 (-0.006067 0.014215 -0.000306)
      PathPoint TailRMuscle_node1: link_Tail22 (-0.005957 0.02025 -0.000178)
      PathPoint TailRMuscle_node2: link_Tail21 (-0.005786 0.005284 0.000731)
      PathPoint TailRMuscle_node3: link_Tail20 (-0.005613 0.005221 0.001028)
      PathPoint TailRMuscle_node4: link_Tail19 (-0.005505 0.005528 0.000876)
      PathPoint TailRMuscle_node5: link_Tail18 (-0.005332 0.005477 0.000788)
      PathPoint TailRMuscle_node6: link_Tail17 (-0.005221 0.005575 0.000723)
      PathPoint TailRMuscle_node7: link_Tail16 (-0.00508 0.005608 0.000792)
      PathPoint TailRMuscle_node8: link_Tail15 (-0.00494 0.00573 0.001034)
      PathPoint TailRMuscle_node9: link_Tail14 (-0.004889 0.005653 0.001447)
      PathPoint TailRMuscle_node10: link_Tail13 (-0.004717 0.005714 0.001331)
      PathPoint TailRMuscle_node11: link_Tail12 (-0.004516 0.005725 0.00207)
      PathPoint TailRMuscle_node12: link_Tail11 (-0.004254 0.005845 0.002304)
      PathPoint TailRMuscle_node13: link_Tail10 (-0.004174 0.005928 0.002648)
      PathPoint TailRMuscle_node14: link_Tail9 (-0.004184 0.005939 0.003158)
      PathPoint TailRMuscle_node15: link_Tail8 (-0.003892 0.005895 0.003879)
      PathPoint TailRMuscle_node16: link_Tail7 (-0.003809 0.006153 0.003883)
      PathPoint TailRMuscle_node17: link_Tail6 (-0.003729 0.006064 0.004702)
      PathPoint TailRMuscle_node18: link_Tail5 (-0.003618 0.006469 0.00469)
      PathPoint TailRMuscle_node19: link_Tail4 (-0.003445 0.006386 0.005297)
      PathPoint TailRMuscle_node20: link_Tail3 (-0.003365 0.006477 0.005909)
      PathPoint TailRMuscle_node21: link_Tail2 (-0.003131 0.006357 0.006519)
      PathPoint TailRMuscle_node22: link_Tail1 (-0.002886 0.007668 0.007287)
    RigidTendonMuscle TailLMuscle: max_isometric_force=1000 optimal_fiber_length=4.847078 tendon_slack_length=0.5385643
      PathPoint TailLMuscle_node0: link_Tail22 (0.006226 0.014239 -0.001069)
      PathPoint TailLMuscle_node1: link_Tail22 (0.00593 0.019862 -0.001159)
      PathPoint TailLMuscle_node2: link_Tail21 (0.00577 0.004846 -0.000292)
      PathPoint TailLMuscle_node3: link_Tail20 (0.005626 0.005098 -0.000125)
      PathPoint TailLMuscle_node4: link_Tail19 (0.005576 0.005136 -0.000504)
      PathPoint TailLMuscle_node5: link_Tail18 (0.005442 0.005576 0.000779)
      PathPoint TailLMuscle_node6: link_Tail17 (0.0052 0.005497 0.000727)
      PathPoint TailLMuscle_node7: link_Tail16 (0.005057 0.005508 0.000797)
      PathPoint TailLMuscle_node8: link_Tail15 (0.005066 0.005526 0.001039)
      PathPoint TailLMuscle_node9: link_Tail14 (0.004895 0.005524 0.00144)
      PathPoint TailLMuscle_node10: link_Tail13 (0.004714 0.005503 0.001331)
      PathPoint TailLMuscle_node11: link_Tail12 (0.004636 0.005471 0.002049)
      PathPoint TailLMuscle_node12: link_Tail11 (0.004498 0.005615 0.002258)
      PathPoint TailLMuscle_node13: link_Tail10 (0.004358 0.005692 0.00262)
      PathPoint TailLMuscle_node14: link_Tail9 (0.004183 0.005664 0.003133)
      PathPoint TailLMuscle_node15: link_Tail8 (0.004041 0.005583 0.003824)
      PathPoint TailLMuscle_node16: link_Tail7 (0.003922 0.005866 0.00387)
      PathPoint TailLMuscle_node17: link_Tail6 (0.003754 0.005803 0.004679)
      PathPoint TailLMuscle_node18: link_Tail5 (0.003599 0.006241 0.004687)
      PathPoint TailLMuscle_node19: link_Tail4 (0.003467 0.006196 0.00529)
      PathPoint TailLMuscle_node20: link_Tail3 (0.003377 0.006273 0.005899)
      PathPoint TailLMuscle_node21: link_Tail2 (0.003237 0.006118 0.006502)
      PathPoint TailLMuscle_node22: link_Tail1 (0.002948 0.007817 0.007284)
    RigidTendonMuscle LVMuscle: max_isometric_force=1000 optimal_fiber_length=1.009276 tendon_slack_length=0.1121418
      PathPoint LVMuscle_node0: link_LV1 (-0.000565 -0.018525 -0.029539)
      PathPoint LVMuscle_node1: link_LV (-0.000055 0.037379 -0.013056)
    RigidTendonMuscle RVMuscle: max_isometric_force=1000 optimal_fiber_length=1.028424 tendon_slack_length=0.1142694
      PathPoint RVMuscle_node0: link_RV1 (0.000451 0.006582 -0.001938)
      PathPoint RVMuscle_node1: link_RV (0.000012 0.000355 -0.003822)
    RigidTendonMuscle RHMuscle: max_isometric_force=1000 optimal_fiber_length=1.093653 tendon_slack_length=0.121517
      PathPoint RHMuscle_node0: link_RH7 (0.000892 0.011579 0.001026)
      PathPoint RHMuscle_node1: link_RH (-0.000103 -0.001649 0.003126)
    RigidTendonMuscle LHMuscle: max_isometric_force=1000 optimal_fiber_length=1.115271 tendon_slack_length=0.123919
      PathPoint LHMuscle_node0: link_LH7 (-0.00082 0.011591 0.001077)
      PathPoint LHMuscle_node1: link_LH (-0.000233 -0.00248 0.002891)
    RigidTendonMuscle BodyMHMuscle: max_isometric_force=1000 optimal_fiber_length=2.248515 tendon_slack_length=0.249835
      PathPoint BodyMHMuscle_node0: link_Body1 (0.000045 0.01514 0.002843)
      PathPoint BodyMHMuscle_node1: link_Body1 (0.000022 0.002928 0.005676)
      PathPoint BodyMHMuscle_node2: link_Body2 (-0.000009 0.002047 0.006586)
      PathPoint BodyMHMuscle_node3: link_Body3 (-0.000017 0.001831 0.006537)
      PathPoint BodyMHMuscle_node4: link_Body4 (-0.000013 0.001846 0.006498)
      PathPoint BodyMHMuscle_node5: link_Body5 (0.000014 0.002175 0.006433)
      PathPoint BodyMHMuscle_node6: link_Body6 (-0.000049 0.001842 0.006384)
      PathPoint BodyMHMuscle_node7: link_Body7 (0.000054 0.00184 0.006318)
      PathPoint BodyMHMuscle_node8: link_Body8 (0.000061 0.001981 0.006288)
      PathPoint BodyMHMuscle_node9: link_Body (-0.00002 0.057759 0.007396)
      PathPoint BodyMHMuscle_node10: link_Body (0.000153 0.046927 0.01186)
    RigidTendonMuscle BodyLVMuscle: max_isometric_force=1000 optimal_fiber_length=0.2741922
        tendon_slack_length=0.0304658
      PathPoint BodyLVMuscle_node0: link_Body (0.006237 0.001736 -0.001037)
      PathPoint BodyLVMuscle_node1: link_Body10 (-0.006282 0.002106 -0.001447)
      PathPoint BodyLVMuscle_node2: link_Body10 (-0.006191 0.007547 0.000899)
    RigidTendonMuscle BodyRVMuscle: max_isometric_force=1000 optimal_fiber_length=0.254594
        tendon_slack_length=0.02828823
      PathPoint BodyRVMuscle_node0: link_Body (-0.006367 0.001827 -0.001014)
      PathPoint BodyRVMuscle_node1: link_Body10 (0.006259 0.002248 -0.001443)
      PathPoint BodyRVMuscle_node2: link_Body10 (0.006356 0.006879 0.000372)
    RigidTendonMuscle BodyRHMuscle: max_isometric_force=1000 optimal_fiber_length=1.765001
        tendon_slack_length=0.1961112
      PathPoint BodyRHMuscle_node0: link_Body1 (-0.006077 0.011578 -0.000074)
      PathPoint BodyRHMuscle_node1: link_Body1 (-0.00626 0.002072 -0.001421)
      PathPoint BodyRHMuscle_node2: link_Body2 (-0.006321 0.002391 -0.000454)
      PathPoint BodyRHMuscle_node3: link_Body3 (-0.006284 0.002216 -0.000504)
      PathPoint BodyRHMuscle_node4: link_Body4 (-0.006222 0.002051 -0.000548)
      PathPoint BodyRHMuscle_node5: link_Body5 (-0.006254 0.002347 -0.000617)
      PathPoint BodyRHMuscle_node6: link_Body6 (-0.006316 0.00213 -0.00066)
      PathPoint BodyRHMuscle_node7: link_Body7 (-0.006176 0.002142 -0.000725)
      PathPoint BodyRHMuscle_node8: link_Body8 (-0.006307 0.002164 -0.00076)
      PathPoint BodyRHMuscle_node9: link_Body (-0.006183 0.056788 0.000168)
    RigidTendonMuscle BodyLHMuscle: max_isometric_force=1000 optimal_fiber_length=1.790543
        tendon_slack_length=0.1989493
      PathPoint BodyLHMuscle_node0: link_Body1 (0.006272 0.011933 0.00005)
      PathPoint BodyLHMuscle_node1: link_Body1 (0.006225 0.002101 -0.001422)
      PathPoint BodyLHMuscle_node2: link_Body2 (0.00616 0.002154 -0.000448)
      PathPoint BodyLHMuscle_node3: link_Body3 (0.006202 0.002094 -0.000506)
      PathPoint BodyLHMuscle_node4: link_Body4 (0.006222 0.002127 -0.000544)
      PathPoint BodyLHMuscle_node5: link_Body5 (0.006244 0.002412 -0.000616)
      PathPoint BodyLHMuscle_node6: link_Body6 (0.006227 0.002012 -0.000668)
      PathPoint BodyLHMuscle_node7: link_Body7 (0.006258 0.002216 -0.00073)
      PathPoint BodyLHMuscle_node8: link_Body8 (0.006203 0.002205 -0.00076)
      PathPoint BodyLHMuscle_node9: link_Body (0.006356 0.056261 0.000414)
